# OpenSim document version 30000
Model unloadingHarnessModel:
  length_units: meters
  force_units: N
  gravity: 0 9.80665 0
  credits:
    A planar reduced gait model with 10 degrees of freedom and 18 muscles by Ajay Seth. Closely based on Delp S.L., Loan J.P., Hoy M.G., Zajac F.E., Topp E.L., Rosen J.M., Thelen D.G., Anderson F.C., Seth A. Notes: 3D, 23 DOF gait model created by D.G. Thelen, Univ. of Wisconsin-Madison, and Ajay Seth, Frank C. Anderson, and Scott L. Delp, Stanford University. Lower extremity joint defintions based on Delp et al. (1990). Low back joint and anthropometry based on Anderson and Pandy (1999, 2001). Planar knee model of Yamaguchi and Zajac (1989). Seth replaced tibia translation constraints with a CustomJoint for the knee and removed the patella to eliminate all kinematic constraints; insertions of the quadrucepts are handled with moving points in the tibia frame as defined by Delp 1990. Number of muscles was reduced by Anderson to improve simulation speed for demonstrations and is not intended to be used in research. License: Creative Commons (CCBY 3.0). You are free to distribute, remix, tweak, and build upon this work, even commercially, as long as you credit us for the original creation. http://creativecommons.org/licenses/by/3.0/ More Information: http://simtk-confluence.stanford.edu:8080/display/OpenSim/Gait+2392+and+2354+Models
  publications:
    Delp, S.L., Loan, J.P., Hoy, M.G., Zajac, F.E., Topp E.L., Rosen, J.M.: An interactive graphics-based model of the lower extremity to study orthopaedic surgical procedures, IEEE Transactions on Biomedical Engineering, vol. 37, pp. 757-767, 1990. Yamaguchi G.T., Zajac F.E.: A planar model of the knee joint to characterize the knee extensor mechanism." J . Biomech. vol. 22. pp. 1-10. 1989. Anderson F.C., Pandy M.G.: A dynamic optimization solution for vertical jumping in three dimensions. Computer Methods in Biomechanics and Biomedical Engineering 2:201-231, 1999. Anderson F.C., Pandy M.G.: Dynamic optimization of human walking. Journal of Biomechanical Engineering 123:381-390, 2001.
  BodySet:
    Body ground: mass=0 mass_center=(0 0 0) inertia_xx=0 inertia_yy=0 inertia_zz=0
    Body pelvis: mass=11.37517 mass_center=(-0.0724378 0 0) inertia_xx=0.1042337 inertia_yy=0.08831474
        inertia_zz=0.0587075 meshes=(sacrum.vtp pelvis.vtp l_pelvis.vtp)
      CustomJoint ground_pelvis: parent_body=ground location_in_parent=(0 0 0) location=(0 0 0)
        Coordinate pelvis_tilt: motion_type=rotational default_value=0.2617994 range=(-1.570796 1.570796) clamped=false
            locked=true
        Coordinate pelvis_tx: motion_type=translational default_value=0 range=(-5 5) clamped=false locked=true
        Coordinate pelvis_ty: motion_type=translational default_value=-3.418459e-13 range=(-1 2) clamped=false
        SpatialTransform: axes_held_at_zero=(rotation2 rotation3)
          TransformAxis rotation1: coordinates=pelvis_tilt axis=(0 0 1) LinearFunction(coefficients=1 0)
          TransformAxis translation1: coordinates=pelvis_tx axis=(1 0 0) LinearFunction(coefficients=1 0)
          TransformAxis translation2: coordinates=pelvis_ty axis=(0 1 0) LinearFunction(coefficients=1 0)
          TransformAxis translation3: axis=(0 0 1) MultiplierFunction(scale=1, Constant(value=0.02))
    Body harness_hip: mass=1 mass_center=(-0.0724378 0 0) inertia_xx=1e-6 inertia_yy=1e-6 inertia_zz=1e-6
        inertia_xy=1e-6 inertia_xz=1e-6 inertia_yz=1e-6 meshes=cylinder.vtp
      CustomJoint harness_hip_joint: parent_body=pelvis location_in_parent=(-0.13 0.15 0) location=(0 0 0)
        Coordinate hip_tx: motion_type=translational default_value=0 range=(-5 5) clamped=false
        Coordinate hip_ty: motion_type=translational default_value=0 range=(-1 2) clamped=false
        SpatialTransform: axes_held_at_zero=(rotation1 rotation2 rotation3 translation3)
          TransformAxis translation1: coordinates=hip_tx axis=(1 0 0) LinearFunction(coefficients=1 0)
          TransformAxis translation2: coordinates=hip_ty axis=(0 1 0) LinearFunction(coefficients=1 0)
    Body femur_r: mass=8.984038 mass_center=(0 -0.195031 0) inertia_xx=0.1702207 inertia_yy=0.04462096
        inertia_zz=0.1795009 meshes=femur.vtp
      PinJoint hip_r: parent_body=pelvis location_in_parent=(-0.07243781 -0.06772474 0.08555243) location=(0 0 0)
        Coordinate hip_flexion: motion_type=rotational default_value=0 range=(-2.094395 2.094395) clamped=false
            locked=true
    Body tibia_r: mass=3.581001 mass_center=(0 -0.184557 0) inertia_xx=0.04756937 inertia_yy=0.004813567
        inertia_zz=0.04823005 meshes=(tibia.vtp fibula.vtp)
      CustomJoint knee_r: parent_body=femur_r location_in_parent=(0 0 0) location=(0 0 0)
        Coordinate knee_angle_r: motion_type=rotational default_value=0 range=(-2.094395 0.1745329) clamped=false
            locked=true
        SpatialTransform: axes_held_at_zero=(rotation2 rotation3 translation3)
          TransformAxis rotation1: coordinates=knee_angle_r axis=(0 0 1) LinearFunction(coefficients=1 0)
          TransformAxis translation1: coordinates=knee_angle_r axis=(1 0 0)
            MultiplierFunction: scale=1.14724
              SimmSpline: x=(-2.0944 -1.74533 -1.39626 -1.0472 -0.698132 -0.349066 -0.174533 0.197344 0.337395 0.490178 1.52146 2.0944)
                  y=(-0.0032 0.00179 0.00411 0.0041 0.00212 -0.001 -0.0031 -0.005227 -0.005435 -0.005574 -0.005435 -0.00525)
          TransformAxis translation2: coordinates=knee_angle_r axis=(0 1 0)
            MultiplierFunction: scale=1.14724
              SimmSpline: x=(-2.0944 -1.22173 -0.523599 -0.349066 -0.174533 0.159149 2.0944)
                  y=(-0.4226 -0.4082 -0.399 -0.3976 -0.3966 -0.395264 -0.396)
    Body talus_r: mass=0.09658802 mass_center=(0 0 0) inertia_xx=0.00119861 inertia_yy=0.00119861 inertia_zz=0.00119861
        meshes=talus.vtp
      PinJoint ankle_r: parent_body=tibia_r location_in_parent=(0 -0.4250649 0) location=(0 0 0)
        Coordinate ankle_angle_r: motion_type=rotational default_value=0 range=(-1.570796 1.570796) clamped=false
            locked=true
    Body calcn_r: mass=1.20735 mass_center=(0.102708 0.0308124 0) inertia_xx=0.001426461 inertia_yy=0.003973712
        inertia_zz=0.004177492 meshes=foot.vtp
      WeldJoint subtalar_r: parent_body=talus_r location_in_parent=(-0.0543288 -0.04673146 0.008822722)
          location=(0 0 0)
    Body toes_r: mass=0.2092097 mass_center=(0.035537 0.00616248 -0.0179739) inertia_xx=0.0001018901
        inertia_yy=0.0002037801 inertia_zz=0.0001018901 meshes=bofoot.vtp
      WeldJoint mtp_r: parent_body=calcn_r location_in_parent=(0.1836419 -0.00205416 0.001109246) location=(0 0 0)
    Body femur_l: mass=8.984038 mass_center=(0 -0.195031 0) inertia_xx=0.1702207 inertia_yy=0.04462096
        inertia_zz=0.1795009 meshes=l_femur.vtp
      PinJoint hip_l: parent_body=pelvis location_in_parent=(-0.07243781 -0.06772474 -0.08555243) location=(0 0 0)
        Coordinate hip_flexion_l: motion_type=rotational default_value=0 range=(-2.094395 2.094395) clamped=false
            locked=true
    Body tibia_l: mass=3.581001 mass_center=(0 -0.184557 0) inertia_xx=0.04756937 inertia_yy=0.004813567
        inertia_zz=0.04823005 meshes=(l_tibia.vtp l_fibula.vtp)
      CustomJoint knee_l: parent_body=femur_l location_in_parent=(0 0 0) location=(0 0 0)
        Coordinate knee_angle_l: motion_type=rotational default_value=0 range=(-2.094395 0.1745329) clamped=false
            locked=true
        SpatialTransform: axes_held_at_zero=(rotation2 rotation3 translation3)
          TransformAxis rotation1: coordinates=knee_angle_l axis=(0 0 1) LinearFunction(coefficients=1 0)
          TransformAxis translation1: coordinates=knee_angle_l axis=(1 0 0)
            MultiplierFunction: scale=1.14724
              SimmSpline: x=(-2.0944 -1.74533 -1.39626 -1.0472 -0.698132 -0.349066 -0.174533 0.197344 0.337395 0.490178 1.52146 2.0944)
                  y=(-0.0032 0.00179 0.00411 0.0041 0.00212 -0.001 -0.0031 -0.005227 -0.005435 -0.005574 -0.005435 -0.00525)
          TransformAxis translation2: coordinates=knee_angle_l axis=(0 1 0)
            MultiplierFunction: scale=1.14724
              SimmSpline: x=(-2.0944 -1.22173 -0.523599 -0.349066 -0.174533 0.159149 2.0944)
                  y=(-0.4226 -0.4082 -0.399 -0.3976 -0.3966 -0.395264 -0.396)
    Body talus_l: mass=0.09658802 mass_center=(0 0 0) inertia_xx=0.00119861 inertia_yy=0.00119861 inertia_zz=0.00119861
        meshes=l_talus.vtp
      PinJoint ankle_l: parent_body=tibia_l location_in_parent=(0 -0.4250649 0) location=(0 0 0)
        Coordinate ankle_angle_l: motion_type=rotational default_value=0 range=(-1.047198 1.047198) clamped=false
            locked=true
    Body calcn_l: mass=1.20735 mass_center=(0.102708 0.0308124 0) inertia_xx=0.001426461 inertia_yy=0.003973712
        inertia_zz=0.004177492 meshes=l_foot.vtp
      WeldJoint subtalar_l: parent_body=talus_l location_in_parent=(-0.0543288 -0.04673146 -0.008822722)
          location=(0 0 0)
    Body toes_l: mass=0.2092097 mass_center=(0.035537 0.00616248 0.0179739) inertia_xx=0.0001018901
        inertia_yy=0.0002037801 inertia_zz=0.0001018901 meshes=l_bofoot.vtp
      WeldJoint mtp_l: parent_body=calcn_l location_in_parent=(0.1836419 -0.00205416 -0.001109246) location=(0 0 0)
    Body torso: mass=33.06845 mass_center=(-0.0323916 0.34551 0) inertia_xx=1.660314 inertia_yy=0.850707
        inertia_zz=1.611783 meshes=(hat_spine.vtp hat_jaw.vtp hat_skull.vtp hat_ribs.vtp)
      PinJoint back: parent_body=pelvis location_in_parent=(-0.1031752 0.08350327 0) location=(0 0 0)
        Coordinate lumbar_extension: motion_type=rotational default_value=0 range=(-1.570796 1.570796) clamped=false
            locked=true
    Body harness_shoulder_1: mass=0.001 mass_center=(-0.0724378 0.1 0.01) inertia_xx=1e-6 inertia_yy=1e-6
        inertia_zz=1e-6 inertia_xy=1e-6 inertia_xz=1e-6 inertia_yz=1e-6
      CustomJoint shoulder_right_joint: parent_body=torso location_in_parent=(-0.025 0.4 0.17) location=(0 0 0)
        Coordinate shR_tx: motion_type=translational default_value=0 range=(-5 5) clamped=false
        Coordinate shR_ty: motion_type=translational default_value=0 range=(-1 2) clamped=false
        SpatialTransform: axes_held_at_zero=(rotation1 rotation2 rotation3 translation3)
          TransformAxis translation1: coordinates=shR_tx axis=(1 0 0) LinearFunction(coefficients=1 0)
          TransformAxis translation2: coordinates=shR_ty axis=(0 1 0) LinearFunction(coefficients=1 0)
    Body harness_shoulder_2: mass=0.001 mass_center=(-0.0724378 0.1 0.01) inertia_xx=1e-6 inertia_yy=1e-6
        inertia_zz=1e-6 inertia_xy=1e-6 inertia_xz=1e-6 inertia_yz=1e-6
      CustomJoint shoulder_left_joint: parent_body=torso location_in_parent=(-0.025 0.4 -0.17) location=(0 0 0)
        Coordinate shL_tx: motion_type=translational default_value=0 range=(-5 5) clamped=false
        Coordinate shL_ty: motion_type=translational default_value=0 range=(-1 2) clamped=false
        SpatialTransform: axes_held_at_zero=(rotation1 rotation2 rotation3 translation3)
          TransformAxis translation1: coordinates=shL_tx axis=(1 0 0) LinearFunction(coefficients=1 0)
          TransformAxis translation2: coordinates=shL_ty axis=(0 1 0) LinearFunction(coefficients=1 0)
  ForceSet:
    PathSpring external_tension: resting_length=2.15093 [m] stiffness=10000 [N/m] dissipation=0.7 [s/m]
      PathPoint hip1: ground (-0.13 -2 0)
      PathPoint harness_hip: harness_hip (0 0 0)
    PathSpring shoulder_hip_right: resting_length=0.3335083 stiffness=15000 dissipation=0.2
      PathPoint hip1: harness_hip (0 0 0.17)
      PathPoint shoulder1: harness_shoulder_1 (0 0 0)
    PathSpring shoulder_hip_left: resting_length=0.3335083 stiffness=15000 dissipation=0.2
      PathPoint hip2: harness_hip (0 0 -0.17)
      PathPoint shoulder2: harness_shoulder_2 (0 0 0)
    SpringGeneralizedForce hip_body_right_hor: coordinate=hip_tx stiffness=10000 rest_length=0 viscosity=0.1
    SpringGeneralizedForce hip_body_right_ver: coordinate=hip_ty stiffness=10000 rest_length=0 viscosity=0.1
    SpringGeneralizedForce hip_body_left_hor: coordinate=hip_tx stiffness=10000 rest_length=0 viscosity=0.1
    SpringGeneralizedForce hip_body_left_ver: coordinate=hip_ty stiffness=10000 rest_length=0 viscosity=0.1
    SpringGeneralizedForce shoulder_body_right_hor: coordinate=shR_tx stiffness=30000 rest_length=0 viscosity=0.1
    SpringGeneralizedForce shoulder_body_right_ver: coordinate=shR_ty stiffness=30000 rest_length=0 viscosity=0.1
    SpringGeneralizedForce shoulder_body_left_hor: coordinate=shL_tx stiffness=30000 rest_length=0 viscosity=0.1
    SpringGeneralizedForce shoulder_body_left_ver: coordinate=shL_ty stiffness=30000 rest_length=0 viscosity=0.1
    CoordinateLimitForce hip_limit: coordinate=hip_ty upper_stiffness=10000000 [N*m/degree] upper_limit=0.15 [degrees]
        lower_stiffness=100 [N*m/degree] lower_limit=-0.2 [degrees] damping=0.001 transition=0.1 [degrees]
        compute_dissipation_energy=false
  MarkerSet:
    Marker Sternum: torso (0.103606 0.312439 1.04318e-6)
    Marker R.Acromium: torso (-0.0248718 0.426445 0.168585)
    Marker L.Acromium: torso (-0.0220089 0.440789 -0.171971)
    Marker Top.Head: torso (0.0595133 0.699598 0.0105017)
    Marker R.ASIS: pelvis (0.0228989 0.0358624 0.130116)
    Marker L.ASIS: pelvis (0.0291329 0.0276591 -0.131894)
    Marker V.Sacral: pelvis (-0.172091 0.0400029 0.00619843)
    Marker R.Thigh.Upper: femur_r (0.0507116 -0.220081 0.0883855)
    Marker R.Thigh.Front: femur_r (0.107902 -0.281747 -0.00690114)
    Marker R.Thigh.Rear: femur_r (0.0395109 -0.340915 0.0789543)
    Marker R.Knee.Lat: femur_r (-0.000586415 -0.426232 0.0605411)
    Marker R.Knee.Med: femur_r (-0.00243031 -0.442908 -0.0607482)
    Marker R.Shank.Upper: tibia_r (-0.0233139 -0.0603613 0.070733)
    Marker R.Shank.Front: tibia_r (0.0516752 -0.0954298 0.0163046)
    Marker R.Shank.Rear: tibia_r (-0.00738164 -0.145526 0.0800029)
    Marker R.Ankle.Lat: tibia_r (-0.00490543 -0.430843 0.0549207)
    Marker R.Ankle.Med: tibia_r (0.00286259 -0.416327 -0.034325)
    Marker R.Heel: calcn_r (-0.0204819 0.0172884 -0.00503735)
    Marker R.Midfoot.Sup: calcn_r (0.122708 0.0309658 -0.0403332)
    Marker R.Midfoot.Lat: calcn_r (0.117766 0.011129 0.0669726)
    Marker R.Toe.Lat: calcn_r (0.207693 -0.0114107 0.0760669)
    Marker R.Toe.Med: calcn_r (0.209814 0.00169807 -0.0323684)
    Marker R.Toe.Tip: calcn_r (0.270734 0.00315005 -0.000612297)
    Marker L.Thigh.Upper: femur_l (0.0358442 -0.20749 -0.0932573)
    Marker L.Thigh.Front: femur_l (0.114084 -0.249177 -0.0175704)
    Marker L.Thigh.Rear: femur_l (0.025891 -0.316213 -0.0778532)
    Marker L.Knee.Lat: femur_l (-0.000753513 -0.446142 -0.062296)
    Marker L.Knee.Med: femur_l (0.000472512 -0.445432 0.0539506)
    Marker L.Shank.Upper: tibia_l (0.00398588 -0.071611 -0.0777086)
    Marker L.Shank.Front: tibia_l (0.0481427 -0.121536 -0.0223037)
    Marker L.Shank.Rear: tibia_l (-0.0132436 -0.114739 -0.0885072)
    Marker L.Ankle.Lat: tibia_l (0.00383431 -0.428451 -0.0544338)
    Marker L.Ankle.Med: tibia_l (0.0078901 -0.405161 0.0369253)
    Marker L.Heel: calcn_l (-0.0226192 0.0268643 0.00786188)
    Marker L.Midfoot.Sup: calcn_l (0.149706 0.0307045 0.0342606)
    Marker L.Midfoot.Lat: calcn_l (0.131321 0.0305726 -0.064363)
    Marker L.Toe.Lat: calcn_l (0.194745 0.00778416 -0.0748386)
    Marker L.Toe.Med: calcn_l (0.211787 0.00788619 0.0273165)
    Marker L.Toe.Tip: calcn_l (0.260978 0.00906907 0.00201318)
