# OpenSim document version 30000
ControlSet Control Set:
  ControlLinear hip_body_r: is_model_control=true extrapolate=true default_min=0.02 default_max=1 filter_on=false
      use_steps=false kp=100 kv=20
    x_nodes:
      ControlLinearNode: t=0 value=10.8125
      ControlLinearNode: t=3 value=10.8125
  ControlLinear hip_body_l: is_model_control=true extrapolate=true default_min=0.02 default_max=1 filter_on=false
      use_steps=false kp=100 kv=20
    x_nodes:
      ControlLinearNode: t=0 value=10.8125
      ControlLinearNode: t=3 value=10.8125
